**  8-node     7-----------3
**            /|          /|
**           / |         / |    y
**          5-----------1  |    |
**          |  |        |  |    |
**          |  |        |  |    |
**          |  8--------|--4    0-----> x
**          | /         | /    /
**          |/          |/    /
**          6-----------2    z   origin at node 8
*Node, nset=all_nodes
      1,           1.,           1.,           1.
      2,           1.,           0.,           1.
      3,           1.,           1.,           0.
      4,           1.,           0.,           0.
      5,           0.,           1.,           1.
      6,           0.,           0.,           1.
      7,           0.,           1.,           0.
      8,           0.,           0.,           0.
** ----------------------------------------------------------------
*Element, type=C3D8, elset=main_element
1, 5, 6, 8, 7, 1, 2, 4, 3
**Element, type=C3D8H, elset=test_element
**2, 5, 6, 8, 7, 1, 2, 4, 3
*Nset, nset=Set-1, generate
 2,  8,  2
*Nset, nset=Set-2, generate
 1,  7,  2
*Nset, nset=Set-3
 1, 2, 5, 6
*Nset, nset=Set-4, generate
 5,  8,  1
*Nset, nset=Set-5
 2, 4, 6, 8
*Nset, nset=Set-6
 3, 4, 7, 8
*Nset, nset=Set-7, generate
 1, 4, 1
*Nset, nset=Set-8
 1,3
*Nset, nset=Set-9
 6,8
*Elset, elset=Surf
 1,
** Surface - Nodes
** S1 - 5,6,7,8
** S2 - 1,2,3,4
** S3 - 1,2,5,6
** S4 - 2,4,6,8
** S5 - 3,4,7,8
** S6 - 1,3,5,7
*Surface, type=ELEMENT, name=Surf-1
Surf, S1
*Surface, type=ELEMENT, name=Surf-2
Surf, S2
*Surface, type=ELEMENT, name=Surf-3
Surf, S3
*Surface, type=ELEMENT, name=Surf-4
Surf, S4
*Surface, type=ELEMENT, name=Surf-5
Surf, S5
*Surface, type=ELEMENT, name=Surf-6
Surf, S6
** ----------------------------------------------------------------
**                PARAMETERS: MATERIAL LOCAL ORIENTATIONS
** ----------------------------------------------------------------
*INCLUDE, input=material_param.inp
** ----------------------------------------------------------------
**                         SECTIONS
** ----------------------------------------------------------------
** ----------------------------------------------------------------
**     UD - user defined
** ----------------------------------------------------------------
*INCLUDE, file=sec_anl_rnd.inp
** ----------------------------------------------------------------
**     UDMG - user defined with damage
** ----------------------------------------------------------------
**INCLUDE, file=sec_udmg.inp
** in case non-dmg averaging is considered...
**INCLUDE, file=sec_udmgnl.inp
**Initial Conditions, type=field
** STEP: STATIC
**
*Step, name=static, nlgeom=Yes, inc=200
*Static
**0.1, 6., 1e-05, 0.03
0.01, 1., 1e-05, 0.1
**
** ----------------------------------------------------------------
**     BCS
** ----------------------------------------------------------------
** ----------------------------------------------------------------
**     UNIAXIAL BCS
** ----------------------------------------------------------------
**INCLUDE, file=bcs_uni.inp
** ----------------------------------------------------------------
**     BIAXIAL BCS
** ----------------------------------------------------------------
**INCLUDE, file=bcs_bi.inp
** ----------------------------------------------------------------
**     SHEAR BCS
** ----------------------------------------------------------------
*INCLUDE, file=bcs_sh.inp
** ----------------------------------------------------------------
** OUTPUT
*OUTPUT,FIELD,VARIABLE=PRESELECT,FREQ=1
*ELEMENT OUTPUT, elset=main_element
SDV
*OUTPUT,HISTORY,VARIABLE=PRESELECT,FREQ=1
*End Step
** ----------------------------------------------------------------
** -----------------------
** STEP 2: STATIC, CONSTANT SHEAR/STRETCH
** -----------------------
*Step, name=static_2, nlgeom=Yes, inc=200
*Static
0.01, 1., 1e-06, 0.1

** BOUNDARY CONDITIONS
** Uniaxial
**INCLUDE, file=bcs_uni_hold.inp
** Biaxial
**INCLUDE, file=bcs_bi_hold.inp
** Shear
*INCLUDE, file=bcs_sh_hold.inp

** OUTPUT
*OUTPUT,FIELD,VARIABLE=PRESELECT,FREQ=1
*ELEMENT OUTPUT, elset=main_element
SDV
*OUTPUT,HISTORY,VARIABLE=PRESELECT,FREQ=1
*End Step
** ----------------------------------------------------------------
