*Solid Section, elset=main_element, material=UD
*Material, name=UD
*User Material, constants=14
<K>,<C10>,<C01>,<PHI>,<L>,<R0F>,<R0C>,<ETA>
<MU0>,<BETA>,<B0>,<LAMBDA0>,<NA>,<BDISP>
*DEPVAR
11,
1, DET, "DET"
2, ETAC1, "ETAC1"
3, ETAC2, "ETAC2"
4, ETAC3, "ETAC3"
5, ETAC4, "ETAC4"
6, ETAC5, "ETAC5"
7, ETAC6, "ETAC6"
8, ETAC7, "ETAC7"
9, ETAC8, "ETAC8"
10, ETAC9, "ETAC9"
11, ETAC10, "ETAC10"
